! ===================================================================================================================================== !
!                                                        Switches IEEE13                                                              !
! ===================================================================================================================================== !

! ===================================================================================================================================== !
!                                                          Coments                                                                      !
! ===================================================================================================================================== !
!                                                                                                                                       !
! ===================================================================================================================================== !

! ------------------------------------------------------- Switches ------------------------------------------------------------------ !
New Line.671692    Phases=3 Bus1=671   Bus2=692  Switch=y
~ r1=1e-4 r0=1e-4 x1=0.000 x0=0.000 c1=0.000 c0=0.000
! ------------------------------------------------------------------------------------------------------------------------------------- !
